<Lems xmlns="http://www.neuroml.org/lems/0.7.2" xmlns:xsi="http://www.w3.org/2001/XMLSchema-instance" xsi:schemaLocation="http://www.neuroml.org/lems/0.7.2  https://raw.github.com/LEMS/LEMS/development/Schemas/LEMS/LEMS_v0.7.2.xsd">

    <Target component="sim1" reportFile="simulator.props" timesFile="time.dat"/>

        <!--Include standard NeuroML 2 ComponentType definitions-->

    <Include file="Cells.xml"/>
    <Include file="Networks.xml"/>
    <Include file="Simulation.xml"/>

        <!--   Channel/synapse files-->
    <Include file="Golgi_KAHP.channel.nml"/>

    <Include file="LeakCond.channel.nml"/>

    -    <Include file="CaClamp.nml"/>

        <!--   Cell files-->
    <Include file="TestKAHP.cell.nml"/>
        <!--   Network file-->
    <Include file="TestKAHP.net.nml"/>

        <!--Note: this could be: Simulation id="sim1" ... , but Component type="Simulation" ...
        is used to allow validation of this file according to the LEMS schema specified above...-->
    <Component type="Simulation" id="sim1" length="1000.0ms" step="0.05ms" target="network_Soma">

        <Display id="CG_v" title="Soma VOLTAGE" xmin="-60.0" xmax="1060.0" ymin="-120.0" ymax="64.0" timeScale="1ms">
            <Line id="VOLTAGE" timeScale="1ms" quantity="CG_Test/0/TestKAHP/v" scale="1 mV" color="#000000"/>
        </Display>

        <Display id="GraphWin_0" title="Soma channels" xmin="-60.0" xmax="1060.0" ymin="-0.1" ymax="1.1" timeScale="1ms">
            <Line id="o1" timeScale="1ms" quantity="CG_Test/0/TestKAHP/biophys/membraneProperties/Golgi_KAHP_all/Golgi_KAHP/n/o1/occupancy" scale="1" color="#000000"/>
            <Line id="o2" timeScale="1ms" quantity="CG_Test/0/TestKAHP/biophys/membraneProperties/Golgi_KAHP_all/Golgi_KAHP/n/o2/occupancy" scale="1" color="#FF0000"/>

            <Line id="c1" timeScale="1ms" quantity="CG_Test/0/TestKAHP/biophys/membraneProperties/Golgi_KAHP_all/Golgi_KAHP/n/c1/occupancy" scale="1" color="#0000ff"/>
            <Line id="c2" timeScale="1ms" quantity="CG_Test/0/TestKAHP/biophys/membraneProperties/Golgi_KAHP_all/Golgi_KAHP/n/c2/occupancy" scale="1" color="#00ff00"/>
            <Line id="c3" timeScale="1ms" quantity="CG_Test/0/TestKAHP/biophys/membraneProperties/Golgi_KAHP_all/Golgi_KAHP/n/c3/occupancy" scale="1" color="#ff6600"/>
            <Line id="c4" timeScale="1ms" quantity="CG_Test/0/TestKAHP/biophys/membraneProperties/Golgi_KAHP_all/Golgi_KAHP/n/c4/occupancy" scale="1" color="#7a5230"/>
        </Display>

        <Display id="CG_conc" title="Soma [Ca2+]" xmin="-60" xmax="1060" ymin="-0.0006" ymax="0.006" timeScale="1ms">
            <Line id="[Ca2+]" timeScale="1ms" quantity="CG_Test/0/TestKAHP/caConc" scale="1 mM" color="#000000"/>
        </Display>

        <OutputFile id="states" fileName="KAHP.states.dat">
            <OutputColumn id="o1" quantity="CG_Test/0/TestKAHP/biophys/membraneProperties/Golgi_KAHP_all/Golgi_KAHP/n/o1/occupancy"/>
            <OutputColumn id="o2" quantity="CG_Test/0/TestKAHP/biophys/membraneProperties/Golgi_KAHP_all/Golgi_KAHP/n/o2/occupancy"/>
            <OutputColumn id="c1" quantity="CG_Test/0/TestKAHP/biophys/membraneProperties/Golgi_KAHP_all/Golgi_KAHP/n/c1/occupancy"/>
            <OutputColumn id="c2" quantity="CG_Test/0/TestKAHP/biophys/membraneProperties/Golgi_KAHP_all/Golgi_KAHP/n/c2/occupancy"/>
            <OutputColumn id="c3" quantity="CG_Test/0/TestKAHP/biophys/membraneProperties/Golgi_KAHP_all/Golgi_KAHP/n/c3/occupancy"/>
            <OutputColumn id="c4" quantity="CG_Test/0/TestKAHP/biophys/membraneProperties/Golgi_KAHP_all/Golgi_KAHP/n/c4/occupancy"/>
        </OutputFile>

        <OutputFile id="v" fileName="KAHP.v.dat">
            <OutputColumn id="v" quantity="CG_Test/0/TestKAHP/v"/>
        </OutputFile>

    </Component>

</Lems>
